// SBML level 2 version 1

model module_test()

  // Compartments:
  compartment default = 1;
  compartment diffusion_1 in default = 1; diffusion_1 is "diffusion:1::";
  compartment reaction_2 in default = 1; reaction_2 is "reaction:2::";
  compartment E_1_3_0_0 in default = 1; E_1_3_0_0 is "E::1,3:0,0";
  compartment B_1_2_1_0 in default = 1; B_1_2_1_0 is "B::1,2:1,0";
  compartment E_1_2_0 in default = 1; E_1_2_0 is "E::1:2,0";
  compartment E_1_1_1 in default = 1; E_1_1_1 is "E::1:1,1";
  compartment B_1_2_0_1 in default = 1; B_1_2_0_1 is "B::1,2:0,1";
  compartment B_1_2_2_1 in default = 1; B_1_2_2_1 is "B::1,2:2,1";
  compartment E_1_0_2 in default = 1; E_1_0_2 is "E::1:0,2";
  compartment B_1_2_1_2 in default = 1; B_1_2_1_2 is "B::1,2:1,2";
  compartment E_1_2_2 in default = 1; E_1_2_2 is "E::1:2,2";

  // Species:
  species A_diffusion_1 in diffusion_1 = 100/diffusion_1;
  species B in reaction_2 = 0;
  species A_default in default = 0;
  species A_reaction_2 in reaction_2 = 0;

  // Reactions:
  re1: A_diffusion_1 => A_default; re1_c1; re1 is "diffusion:0,-1";
    re1_c1 = 0.005;
  re2: A_diffusion_1 => A_default; re2_c1; re2 is "diffusion:-1,0";
    re2_c1 = 0.005;
  re3: A_diffusion_1 => A_default; re3_c1; re3 is "diffusion:1,0";
    re3_c1 = 0.005;
  re4: A_diffusion_1 => A_default; re4_c1; re4 is "diffusion:0,1";
    re4_c1 = 0.005;
  re5: A_reaction_2 => B; re5_c2; re5 is "reaction";
    re5_c2 = 0.002;
end
