// SBML level 2 version 4

model reactions1()
  // examples of reactions (c) 2008 jamie twycross

  // Compartments:
  compartment default = 1 volume;
  compartment compartment_1_0_0 in default = 1 volume; compartment_1_0_0 is "compartment:1::0,0";

  // Species:
  species $A in compartment_1_0_0 = 100/compartment_1_0_0;
  species C in compartment_1_0_0 = 0;
  species D in compartment_1_0_0 = 0;
  species sa9_degraded in compartment_1_0_0 = 0;
  species E in compartment_1_0_0 = 0;
  species B_gaussian_50_10 in compartment_1_0_0 = 0; B_gaussian_50_10 is "B:gaussian:50:10";

  // Reactions:
  r1: $A => B_gaussian_50_10; r1_c1;
    r1_c1 = 0.5;
  r2: $A => C + D; c2;
    c2 = 0.4;
  r3: C + B_gaussian_50_10 => $A; c3;
    c3 = 0;
  r4: C => sa9_degraded; c4;
    c4 = 0.01;
  r5: $A + B_gaussian_50_10 => C + D; c5;
    c5 = 0.02;
  re9: $A => C + D + E; c6;
    c6 = 0.25;
  re10: $A + B_gaussian_50_10 => C + D + E; c7;
    c7 = 0.35;

  // Unit definitions:
  unit substance = mole;
  unit volume = litre;
  unit area = metre^2;
  unit length = metre;
  unit time = second;
end
